Simulations: Version=79
  Memo Introduction
    # Simulating crop rotation under controlled  conditions

    *Rob Zyskowski, Edmar I. Teixeira, Hamish Brown, Edith Khaembah, Rogerio Cichota*
    *The New Zealand Institute for Plant & Food Research Limited, Private Bag 4704, Christchurch, New Zealand*

    ## Introduction

    This is a simulation of a crop rotation consisting of a forage species, fodder beet (*Beta vulgaris* L.), grown over spring/summer and harvested in autumn, followed by a catch crop, oats (*Avena sativa* L.). The actual experiment was divided in two phases and was established at the rain shelter facility of Plant and Food Research, Lincoln, NZ.  The experiment was designed to help develop the models for the respective plants and here they are used to further demonstrate that ApsimX can simulate water and nitrogen cycling in the field and then to examine whether catch crops are a good option for mitigating N leaching from forages.

     **Phase 1**: Co-limitation of water and nitrogen on fodder beet physiology
     - Irrigation: 2 treatments, nil or full irrigation (to match PET)
     - Nitrogen: 3 treatments, 0 kg N/ha, 50 kg N/ha & 300 kg N/ha applied as dissolved urea with fertigator
      - 25 or 100 kg N/ha applied after emergence
      - 25 or 100 kg N/ha applied when canopy nearly reached full cover
      - 100 kg N/ha applied a month after full cover

     **Phase 2**: Ability of oats to act as catch-crops for N over winter/spring
     - Irrigation: 2 treatments, low (enough to keep plants growing) or full irrigation (to match PET)
     - Nitrogen: 3 treatments, 80 kg N/ha, 125 kg N/ha & 320 kg N/ha at sowing (residual plus urea applied at sowing)

    ### Acknowledgments
    This work was a collaborative effort funded by the Sustainable Agro-Ecosystems (SAE) and the Forages for Reduced Nitrogen Leaching (FRNL) programmes.  The experiment was setup and conducted by several people, including Brendon Malcolm, Emmanuel Chakwizira, Shane Maley, Mike George, Steve Dilon and Alexandre Michel, to whom we would like to express our gratitude.
  Replacements
  DataStore
    Input OBS: FileName=OBS.txt
      Memo Note
        Where:
         - n: The number of PO (predicted-observed) pairs for the given variable;
         - Slope: The slope of the straight line linear regression. A perfect fit would have a value of 1;
         - Intercept: The intercept of the straight line linear regression. A perfect fit would have a value of 0;
         - SEslope: Standard error in the slope;
         - SEintercept: Standard error in the intercept.;
         - R2: The value for the coefficient of determination. It varies between 0 and 1, where 1 is a perfect fit;
         - RMSE: Root Mean Squared Error. 0 is a perfect fit. Values less than half the standard deviation of the observed data are acceptable;
         - NSE: Nash-Sutcliffe Efficiency. Indicates how well the PO data fits the 1:1 line. Ranges from -∞ to 1 with 1 being the optimal value while values  between 0 and 1 are generally viewed as acceptable. Values < 0 indicate unacceptable model performance;
         - ME: Mean Error between predicted and observed values. 0 is a perfect fit;
         - MAE: Mean Absolute Error. 0 is a perfect fit. Values less than half the standard deviation of the observed data are acceptable;
         - RSR: Ratio between the RMSE and the standard deviation of observations. 0 is a perfect fit;
    PredictedObserved: PredictedTableName=FRNLReport; ObservedTableName=OBS; FieldNameUsedForMatch=Clock.Today
      Tests: POName=PredictedObserved
        AcceptedStats:
          Name                            n    Slope      Intercept  SEslope    SEintercept  R2         RMSE        NSE         ME          MAE         RSR
          FodderBeet.Leaf.CoverTotal      120  0.848536   0.147501   0.0373782  0.0262404    0.81369    0.100004    0.762325    0.0458097   0.0784911   0.485483
          FodderBeet.Leaf.LAI             36   0.800509   0.32288    0.0792063  0.186968     0.750265   0.683457    0.744729    -0.063027   0.482946    0.498177
          FodderBeet.Leaf.Live.NConc      36   0.555001   0.0126721  0.0868272  0.00280616   0.545806   0.00470006  0.501309    -0.0014015  0.00399857  0.696303
          FodderBeet.Leaf.Live.Wt         36   1.20318    -3.28023   0.128376   17.4565      0.720945   55.1377     0.29745     20.8995     43.2563     0.826459
          FodderBeet.Leaf.N               36   1.28581    0.759461   0.104678   0.462829     0.816101   2.42049     -0.0598436  1.82968     1.90223     1.01509
          FodderBeet.Petiole.Live.Wt      36   0.731305   55.6363    0.0461087  5.30573      0.880934   45.0199     0.680496    33.3207     40.2731     0.557341
          FodderBeet.Petiole.N            36   0.868138   1.36032    0.0579609  0.110323     0.868391   1.30364     0.173801    1.19531     1.24689     0.896241
          FodderBeet.Petiole.NConc        36   0.0606095  0.0164325  0.0349696  0.000600527  0.0811804  0.00583164  0.0285638   0.00128822  0.00477293  0.971829
          FodderBeet.Phenology.Stage      8    0.264057   2.59054    0.0554578  0.144921     0.790729   0.761026    -2.26009    0.692577    0.692577    1.68896
          FodderBeet.StorageRoot.Live.Wt  36   0.9277     22.143     0.0241213  29.4432      0.97753    120.96      0.969739    -50.389     90.3909     0.171524
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        AcceptedStatsName=Name n Slope Intercept SEslope SEintercept R2 RMSE NSE ME MAE RSR
  Experiment RS_Rotation
    Memo Experiment Description
      ## Management
      Pre-experiment actions:
        23/08/2016 - Oats harvested
        02/09/2016 - Site irrigated with 25mm
        05/09/2016 - Site ploughed
        06/09/2016 - Site cambridge rolled
        17/10/2016 - Site power harrowed
        17/10/2016 - Rainshelter was rolled in
        18/10/2016 - Fertiliser application (200kg/ha of KCl, 250kg/ha of Triple Super, 200kg/ha of NaCl and 30kg/ha of Boronate 15%)
        18/10/2016 - Site cambridge rolled and harrowed

      Experiment:
       1) Fodder beet:
           - Cultivar: Rivage
           - Sowing density: 11 plants/m2
                row spacing: 45 cm
                      depth: 15 mm

          General actions:
              18/10/2016 - Sowing
              25/10/2016 - Irrigation of 5mm to all plots
              27/10/2016 - Plants started to emerge
              28/10/2016 - Irrigation of 5mm to all plots
              28/10/2016 - First fertiliser application, 25kgN/ha of urea_N to the 50kg/ha plots and 100kgN/ha o the 300kg/ha plots
              23/11/2016 - Irrigation treatments started
              18/01/2017 - Second fertiliser application, 25Nkg/ha of liquid urea_N to the 50kg/ha plots and 100kgN/ha to the 300kg/ha plots
              15/02/2017 - Final fertiliser application, 100Nkg/ha of liquid urea_N to the 300kg/ha plots
              17/05/2017 - Plots harvested

       Intercrop actions:
              19/05/2017 - All crop residues removed
              25/05/2017 - Dryland plots irrigated with 100mm, over two days
              29/05/2017 - Dryland 300N plot irrigated with 64.0mm
              30/05/2017 - Dryland 0N and 50N plots irrigated with 30.3 and 51.0mm
              22/06/2017 - Site topped with maxitell
              30/06/2017 - Site cambridge rolled
              30/06/2017 - Rainshelter was rolled off (but it was put on in a few occasions)

       2) Oats:
           - Cultivar: Milton
           - Sowing density: 300 plants/m2
                row spacing: 15 cm
                      depth: 45 mm

          General actions:
              05/07/2017 - Sowing
              05/07/2017 - Fertiliser application (400kg/ha Potash, Urea: treat4=40kgN/ha, treat5=85kgN/ha, treat6=270kgN/ha)
              24/07/2017 - Plants started to emerge
              11/09/2017 - Irrigation started in treatements 4, 5, and 6
              06/11/2017 - Irrigation extended to all plots
              04-09/01/2018 - Plots harvested
    Factors
      Permutation
        Factor Nit
          CompositeFactor 0
            Specifications:
              [FertiliserSchedule]
              [AdditionalActions].Script.NitFactor = 0
              [CropOperations].Script.FertFactor = 0
            Operations 0
          CompositeFactor 50
            Specifications:
              [FertiliserSchedule]
              [AdditionalActions].Script.NitFactor = 50
              [CropOperations].Script.FertFactor = 50
            Operations 50
              2016-10-28  [Fertiliser].Apply(25, Fertiliser.Types.UreaN, 10);
              2017-01-18  [Fertiliser].Apply(25, Fertiliser.Types.UreaN, 10);
          CompositeFactor 300
            Specifications:
              [FertiliserSchedule]
              [AdditionalActions].Script.NitFactor = 300
              [CropOperations].Script.FertFactor = 300
            Operations 300
              2016-10-28  [Fertiliser].Apply(100, Fertiliser.Types.UreaN, 10);
              2017-01-18  [Fertiliser].Apply(100, Fertiliser.Types.UreaN, 10);
              2017-02-15  [Fertiliser].Apply(100, Fertiliser.Types.UreaN, 10);
        Factor Irr
          CompositeFactor Full
            Specifications:
              [IrrigationSchedule]
              [AdditionalActions].Script.IrrFactor = true
              [CropOperations].Script.IrrgFactor = true
            Operations Full
              2016-11-23  [Irrigation].Apply(30.0)
              2016-11-30  [Irrigation].Apply(25.0)
              2016-12-07  [Irrigation].Apply(25.0)
              2016-12-21  [Irrigation].Apply(25.2)
              2016-12-29  [Irrigation].Apply(30.0)
              2017-01-04  [Irrigation].Apply(40.0)
              2017-01-11  [Irrigation].Apply(32.9)
              2017-01-18  [Irrigation].Apply(25.4)
              2017-01-25  [Irrigation].Apply(31.3)
              2017-02-08  [Irrigation].Apply(33.0)
              2017-02-15  [Irrigation].Apply(35.0)
              2017-02-22  [Irrigation].Apply(29.0)
              2017-03-08  [Irrigation].Apply(34.0)
              2017-03-22  [Irrigation].Apply(50.1)
              2017-04-12  [Irrigation].Apply(30.9)
              2017-04-27  [Irrigation].Apply(18.9)
              2017-09-11  [Irrigation].Apply(20.9)
              2017-09-12  [Irrigation].Apply(21.1)
              2017-09-13  [Irrigation].Apply(21.4)
              2017-10-10  [Irrigation].Apply(22.2)
              2017-10-11  [Irrigation].Apply(22.5)
              2017-10-12  [Irrigation].Apply(22.5)
              Memo
                Have added an extra irrigation, on 22 Oct,

                Data indcates water applied but no notes of it RFZ

                In Statefactors have donethe irrigations for
                  17/12  21/1 19/11 14/1
          CompositeFactor Nil
            Specifications:
              [IrrigationSchedule]
              [AdditionalActions].Script.IrrFactor = false
              [CropOperations].Script.IrrgFactor = false
            Operations Nil
              Memo
                Have added an extra irrigation, on 3 Nov,

                Data indcates water applied but no notes of it RFZ
    Simulation Rainshelter
      Clock: Start=2016-09-28; End=2018-01-27
      Summary summaryfile
      Weather: FileName=lincoln.met
      SoilArbitrator Soil Arbitrator
      Zone paddock: Area=1; Slope=0; AspectAngle=0; Altitude=50
        Folder Manager folder
          Operations GeneralIrrigation
            2016-09-02  [Irrigation].Apply(25.0)
            2016-10-25  [Irrigation].Apply(5.0)
            2016-10-28  [Irrigation].Apply(5.0)
            2016-11-17  [Irrigation].Apply(2.0)
            2017-01-18  [Irrigation].Apply(10.0)
            2017-02-15  [Irrigation].Apply(10.0)
            2017-11-06  [Irrigation].Apply(45.0)
            2017-11-15  [Irrigation].Apply(30.0)
            2017-11-22  [Irrigation].Apply(29.7)
            2017-11-29  [Irrigation].Apply(35.0)
            2017-12-06  [Irrigation].Apply(46.7)
          Operations IrrigationSchedule
          Operations FertiliserSchedule
          Manager CropOperations
            FodderBeetPlantingDate = 2016-10-18
            FodderBeetHarvestingDate = 2017-05-30
            OatsPlantingDate = 2017-07-05
            OatsHarvestingDate1 = 2018-01-05
            OatsHarvestingDate2 = 2018-01-10
```csharp
using System;
using Models.Core;
using Models.PMF;
using APSIM.Shared.Utilities;
using System.Xml.Serialization;
        
namespace Models
{
    [Serializable] 
    [System.Xml.Serialization.XmlInclude(typeof(Model))]
    public class Script : Model
    {
        [Link(ByName = true)] Plant FodderBeet;
        [Link(ByName = true)] Plant Oats;
        [Link] Clock Clock;

        [Description("FodderBeet planting date: ")]
        public DateTime FodderBeetPlantingDate { get; set; }
        [Description("FodderBeet harvesting date: ")]
        public DateTime FodderBeetHarvestingDate { get; set; }
        [Description("Oats planting date: ")]
        public DateTime OatsPlantingDate { get; set; }
        [Description("Oats harvesting date 1: ")]
        public DateTime OatsHarvestingDate1 { get; set; }
        [Description("Oats harvesting date 2: ")]
        public DateTime OatsHarvestingDate2 { get; set; }
        
        [XmlIgnore] public string CropSown { get; set; }
        [XmlIgnore] public string CropAction { get; set; }

        [XmlIgnore] public bool IrrgFactor { get; set; }
        [XmlIgnore] public double FertFactor { get; set; }

        private RemovalFractions removalFractions;
        
        [EventSubscribe("Commencing")]
        private void OnSimulationCommencing(object sender, EventArgs e)
        {
            CropSown = "Fallow";
            CropAction = "-";

            // set removal fractions for FodderBeet(these overrides the default removals in the plant)
            removalFractions = new RemovalFractions();
            removalFractions.SetFractionToRemove("Leaf", 0.95, "Live");
            removalFractions.SetFractionToResidue("Leaf", 0.05, "Live");
            removalFractions.SetFractionToRemove("Leaf", 0.8, "Dead");
            removalFractions.SetFractionToResidue("Leaf", 0.2, "Dead");
            removalFractions.SetFractionToRemove("Petiole", 1.0, "Live");
            removalFractions.SetFractionToResidue("Petiole", 0.0, "Live");
            removalFractions.SetFractionToRemove("Petiole", 0.9, "Dead");
            removalFractions.SetFractionToResidue("Petiole", 0.1, "Dead");
            removalFractions.SetFractionToRemove("StorageRoot", 1.0, "Live");
            removalFractions.SetFractionToResidue("StorageRoot", 0.0, "Live");
            removalFractions.SetFractionToRemove("StorageRoot", 1.0, "Dead");
            removalFractions.SetFractionToResidue("StorageRoot", 0.0, "Dead");
            //complement for oats
            removalFractions.SetFractionToRemove("Stem", 0.9, "Live");
            removalFractions.SetFractionToResidue("Stem", 0.1, "Live");
            removalFractions.SetFractionToRemove("Stem", 0.8, "Dead");
            removalFractions.SetFractionToResidue("Stem", 0.2, "Dead");
            removalFractions.SetFractionToRemove("Panicle", 0.9, "Live");
            removalFractions.SetFractionToResidue("Panicle", 0.1, "Live");
            removalFractions.SetFractionToRemove("Panicle", 0.8, "Dead");
            removalFractions.SetFractionToResidue("Panicle", 0.2, "Dead");
            removalFractions.SetFractionToRemove("Grain", 1.0, "Live");
            removalFractions.SetFractionToResidue("Grain", 0.0, "Live");
            removalFractions.SetFractionToRemove("Grain", 1.0, "Dead");
            removalFractions.SetFractionToResidue("Grain", 0.0, "Dead");

        }
        
        [EventSubscribe("DoManagement")]
        private void OnDoManagement(object sender, EventArgs e)
        {
            CropAction = "-";

            if (Clock.Today.Date == FodderBeetPlantingDate)
            {
                FodderBeet.Sow(population: 9, cultivar: "Rivage", depth: 5, rowSpacing: 500);
                CropSown = "FodderBeet";
                CropAction = "Sowing";
            }
            
            if (Clock.Today.Date == OatsPlantingDate)
            {
                Oats.Sow(population: 400, cultivar: "Milton", depth: 45, rowSpacing: 45);
                CropSown = "Oats";
                CropAction = "Sowing";
            }
            
            
            if (Clock.Today.Date == FodderBeetHarvestingDate)
            {
                FodderBeet.Harvest(removalFractions);
                //FodderBeet.EndCrop();
                //CropSown = "Fallow";
                CropAction = "Harvesting";
            }
            if (Clock.Today.Date == FodderBeetHarvestingDate.AddDays(1))
            {
                //FodderBeet.Harvest(removalFractions);
                FodderBeet.EndCrop();
                CropSown = "Fallow";
            }

            if (Clock.Today.Date == OatsHarvestingDate1)
            {
               if((FertFactor == 0) || ((IrrgFactor == false) && (FertFactor == 50)))
               {
                   Oats.Harvest(removalFractions);
                   CropAction = "Harvesting";
               }
            }

            if (Clock.Today.Date == OatsHarvestingDate2)
            {
               if((FertFactor == 300) || ((IrrgFactor == true) && (FertFactor == 50)))
               {
                   Oats.Harvest(removalFractions);
                   CropAction = "Harvesting";
               }
            }

            if (Clock.Today.Date == OatsHarvestingDate1.AddDays(1))
            {
               if((FertFactor == 0) || ((IrrgFactor == false) && (FertFactor == 50)))
               {
                   Oats.EndCrop();
                   CropSown = "Fallow";
               }
            }

            if (Clock.Today.Date == OatsHarvestingDate2.AddDays(1))
            {
               if((FertFactor == 300) || ((IrrgFactor == true) && (FertFactor == 50)))
               {
                   Oats.EndCrop();
                   CropSown = "Fallow";
               }
            }
        }
        
    }
}
```
          Manager ClimateControl
            StartDate = 2016-10-17
            EndDate = 2017-06-30
            OtherDateString = 27/07/2017 28/07/2017 29/07/2017 30/07/2017 31/07/2017 08/08/2017 09/08/2017 10/08/2017 11/08/2017 12/08/2017 13/08/2017 14/08/2017 15/08/2017 16/08/2017 17/08/2017 18/08/2017 28/08/2017 29/08/2017 30/08/2017 31/08/2017
```csharp
using System;
using Models.Core;
using APSIM.Shared.Utilities;
using System.Collections.Generic;
using System.Text;
using Models.PMF;
using Models;
using System.Xml.Serialization;

// This script simulates a rainshelter, it controls the amount of rainfall (=0.0) and radiation (=95% of weather)
// It does that for a period between two dates, as well as at sporadic dates

namespace Models
{
    [Serializable] 
    [System.Xml.Serialization.XmlInclude(typeof(Model))]
    public class Script : Model
    {
        [Link] Weather Met;
        [Link] Clock Clock;
    
        [Description("Start date: ")]
        public DateTime StartDate { get; set; }
        [Description("End date: ")]
        public DateTime EndDate { get; set; }
         [Description("Other dates: ")]
         public string OtherDateString  { get; set; }

         [XmlIgnore] public string RainshelterCover  { get; set; }

         private DateTime[] OtherDates;
         private double todaysRain;

        [EventSubscribe("Commencing")]
        private void OnSimulationCommencing(object sender, EventArgs e)
        {
            //gather the dates the variables will be controlled
            string[] auxDates = OtherDateString.Split(new Char []{' ',','});
            OtherDates = new DateTime[auxDates.Length];
            for (int i = 0; i < auxDates.Length; i++)
                OtherDates[i] = DateTime.Parse(auxDates[i]);

            RainshelterCover = "Off";
        }

        [EventSubscribe("PreparingNewWeatherData")]
        private void OnPreparingNewWeatherData(object sender, EventArgs e)
        {
            RainshelterCover = "Off";

            if ((Clock.Today.Date >= StartDate.Date) && (Clock.Today.Date <= EndDate.Date))
            {
                todaysRain = Met.Rain;
                changeMetData();
            }
            else
            {
                for (int i = 0; i < OtherDates.Length; i++)
                    if (Clock.Today.Date == OtherDates[0].Date)
                        changeMetData();
            }

            // rain shelter partial day cover
            if (Clock.Today.Date == DateTime.Parse("01/09/2017").Date)
                Met.Rain -= 2.0;
            if (Clock.Today.Date == DateTime.Parse("08/11/2017").Date)
                Met.Rain -= 0.3;

            // rain shelter cover removed for weekend
            if ((Clock.Today.Date == DateTime.Parse("03/06/2017").Date)||(Clock.Today.Date == DateTime.Parse("04/06/2017").Date))
            {
                Met.Rain = todaysRain;
                //Met.Radn /= 0.95;
                RainshelterCover = "Off";
            }
        }

        private void changeMetData()
        {
            Met.Rain *= 0.0;
            //Met.Radn *= 0.95;
            RainshelterCover = "On";
        }
    }
}
```
          Manager AdditionalActions
            NitFactor = 0
            IrrFactor = False
```csharp
using System;
using Models.Core;
using System.Collections.Generic;
using System.Text;
using Models.Soils;
using Models.PMF;
using Models;
using System.Xml.Serialization;
using APSIM.Shared.Utilities;

// This script performs management actions that are not common to all treatments

namespace Models
{
    [Serializable] 
    public class Script : Model
    {
        [Link] Clock Clock;
        [Link] Irrigation Irrigation;
        [Link] Fertiliser Fert;
        [Link] Soil ThisSoil;

        [Description("Allow irrigation to be applied?")]
        public bool IrrFactor { get; set; }
        [Description("Amount of fertiliser to be applied (kg/ha)")]
        public double NitFactor { get; set; }

        [EventSubscribe("Commencing")]
        private void OnSimulationCommencing(object sender, EventArgs e)
        {
            //    SetSoilLayers();
        }
        
        [EventSubscribe("DoManagement")]
        private void OnDoManagement(object sender, EventArgs e)
        {
            // Fodderbeet - irrigation on high fert plots only
            if ((IrrFactor == true) && (NitFactor == 300))
            {
                if (Clock.Today.Date == DateTime.Parse("01-Feb-2017"))
                    Irrigation.Apply(40.0);
                if (Clock.Today.Date == DateTime.Parse("01-Mar-2017"))
                    Irrigation.Apply(32.6);
            }
        
            // Oats - Irrigation on dryland plots only, after harvest
            if (IrrFactor == false)
            {
                if ((Clock.Today.Date == DateTime.Parse("25-May-2017")) || (Clock.Today.Date == DateTime.Parse("26-May-2017")))
                    Irrigation.Apply(50.0);

                if (Clock.Today.Date == DateTime.Parse("29-May-2017"))
                if (NitFactor == 300)
                    Irrigation.Apply(64.0);

                if (Clock.Today.Date == DateTime.Parse("30-May-2017"))
                {
                    if (NitFactor == 0)
                        Irrigation.Apply(30.3);
                    if (NitFactor == 50)
                        Irrigation.Apply(51.0);
                }
            }

            // Oats - Irrigation on all 300N plots plus dryland 50N plots
            if (Clock.Today.Date == DateTime.Parse("13-Dec-2017"))
            {
                if (NitFactor == 300)
                    Irrigation.Apply(50.0);
                if ((NitFactor == 50) && (IrrFactor == false))
                    Irrigation.Apply(50.0);
            }

            // Oats - Fertiliser for irrigated plots only, on sowing
            if (Clock.Today.Date == DateTime.Parse("05-Jul-2017"))
            if (IrrFactor == true)
            {
                if (NitFactor == 0)
                    Fert.Apply(40, Models.Fertiliser.Types.UreaN, 10);
                if (NitFactor == 50)
                    Fert.Apply(85, Models.Fertiliser.Types.UreaN, 10);
                if (NitFactor == 300)
                    Fert.Apply(270, Models.Fertiliser.Types.UreaN, 10);
            }
        }
    }
}
```
        MicroClimate: a_interception=0; b_interception=1; c_interception=0; d_interception=0; soil_albedo=0.23; SoilHeatFluxFraction=0.4; MinimumHeightDiffForNewLayer=0; NightInterceptionFraction=0.5; ReferenceHeight=2
        Irrigation
        Fertiliser
        SurfaceOrganicMatter Surface Organic Matter: InitialResidueName=oat_stubble; InitialResidueType=oats; InitialResidueMass=1500; InitialStandingFraction=0.5; InitialCPR=0; InitialCNR=20; FractionFaecesAdded=1
        Soil: SoilType=Silt loam over sand; LocalName=Templeton; Site=RainShelter; NearestTown=Lincoln; Region=Plains; State=Canterbury; Country=New Zealand; Latitude=37.15; Longitude=172.28; Comments=TEMPLETON-RS
          Memo Info
            # Soil Profile Description

            Templeton Silt Loam over sand, Typic Immature Pallic soil

             Horizon  Depth (cm) Description
             Ah         0-28     Very dark grayish brown (10YR 3/2); silt loam; no stones; moderately developed fine to medium blocky structure
             Bw(f)     28-55     Dark yellowish brown (10YR 4/4); silt loam; no stones; weakly developed coarse to very coarse blocky structure
             Bw(g)     55-95     Olive brown (2.5Y 4/4); fine sandy loam; no stones; apedal massive
             2BC(g)    95-145    Olive brown (2.5Y 4/4); loamy sand;no stones; apedal single-grain
             3BCg     145-153    Light yellowish brown (2.5Y 6/3); silt loam; no stones; apedal massive
             4BCg     153-200+   Light yellowish brown (2.5Y 6/3); medium sand; no stones; apedal single-grain
             ** 2BC(g) horizon contains a band of massive silt loam material between 115-130 cm

            Sampling layers:
            Layer  Depth (cm)
             1	  0-15
             2	 15-30
             3	 30-60
             4	 60-90
             5	 90-120
             6	120-150
             7	150-180 -- Only for water

            Soil parameterisation was based on the two description of the soil at the Rainshelter, with most data being a combination of "templeton-2" description (SWAMP survey) and the vbalues estimated based on the monitoring of the site.
          Chemical
            Thickness  NO3N      NH4N      PH
            150        8.96057   1.19474   6.1
            150        7.92976   1.41603   6.1
            300        0.917191  1.17925   6
            350        0.849705  0.478277  6
            200        0.712335  0.356168  6
            150        0.697162  0.425201  6
            150        0.689576  0.459717  6
            100        0.573281  0.344105  6
            200        0.456986  0.228493  6
            250        0.361303  0.180651  6
          Physical
            Thickness  ParticleSizeClay  ParticleSizeSand  ParticleSizeSilt  BD     AirDry  LL15   DUL    SAT    KS
            150        24                15.9              60.1              1.116  0.063   0.126  0.359  0.534  3472.3
            150        23.2              14.3              62.5              1.177  0.124   0.127  0.352  0.521  1374.7
            300        17.9              16.1              66                1.272  0.117   0.117  0.346  0.494  539.5
            350        13.3              45.5              41.2              1.337  0.12    0.12   0.344  0.47   3985.6
            200        12                42                46                1.404  0.143   0.143  0.358  0.446  2582.8
            150        16.7              11.4              71.9              1.47   0.147   0.147  0.366  0.424  111
            150        12.7              27.4              59.9              1.434  0.13    0.13   0.3    0.436  516.8
            100        12.8              35.1              52                1.459  0.118   0.118  0.276  0.429  1457.9
            200        11.5              40.7              50.9              1.453  0.099   0.099  0.24   0.433  4616.8
            250        11.8              37.9              50.3              1.482  0.089   0.089  0.227  0.428  4841.5
            SoilCrop FodderBeetSoil
              LL=[0.126, 0.127, 0.117, 0.12, 0.143, 0.147, 0.13, 0.118, 0.099, 0.089]
              KL=[0.093, 0.066, 0.059, 0.047, 0.028, 0.014, 0.008, 0.007, 0.003, 0]
              XF=[1, 1, 1, 1, 1, 1, 1, 1, 1, 1]
            SoilCrop OatsSoil
              LL=[0.126, 0.127, 0.117, 0.12, 0.143, 0.147, 0.13, 0.118, 0.099, 0.089]
              KL=[0.083, 0.066, 0.053, 0.043, 0.022, 0.007, 0.008, 0.005, 0.004, 0.002]
              XF=[1, 1, 1, 1, 1, 1, 1, 1, 1, 1]
          SoilWater: SummerDate=1-Oct; SummerU=9; SummerCona=4; WinterDate=1-Apr; WinterU=6; WinterCona=3; DiffusConst=88; DiffusSlope=35; Salb=0.15; CN2Bare=60; CNRed=10; CNCov=0.8; slope=0; discharge_width=0; catchment_area=0; max_pond=0; PrecipitationInterception=0
            Thickness  SWCON  KLAT
            150        0.553  0
            150        0.521  0
            300        0.456  0
            350        0.511  0
            200        0.524  0
            150        0.451  0
            150        0.494  0
            100        0.546  0
            200        0.538  0
            250        0.532  0
          SoilNitrogen: fom_types=[default, manure, mucuna, lablab, shemp, stable]; fract_carb=[0.2, 0.3, 0.54, 0.57, 0.45, 0]; fract_cell=[0.7, 0.3, 0.37, 0.37, 0.47, 0.1]; fract_lign=[0.1, 0.4, 0.09, 0.06, 0.08, 0.9]
            SoilNitrogenNO3 NO3
            SoilNitrogenNH4 NH4
            SoilNitrogenUrea Urea
            SoilNitrogenPlantAvailableNO3 PlantAvailableNO3
            SoilNitrogenPlantAvailableNH4 PlantAvailableNH4
          Organic: FOMCNRatio=30
            Thickness  Carbon  SoilCNRatio  FBiom  FInert  FOM
            150        2.55    11           0.08   0.2     291.718
            150        2.09    11           0.04   0.325   232.942
            300        0.52    11           0.018  0.6     148.53
            350        0.23    11           0.01   0.85    87.8638
            200        0.18    11           0.008  0.95    65.0911
            150        0.15    11           0.008  0.98    51.9763
            150        0.15    11           0.008  0.99    41.5039
            100        0.12    11           0.008  0.992   35.7227
            200        0.11    11           0.005  0.995   26.4641
            250        0.1     11           0.005  0.995   18.1885
          CERESSoilTemperature
          Sample Initial Soil Settings: Thickness=[150, 150, 300, 300, 300, 300, 300, 200]; SW=[0.3, 0.28, 0.27, 0.3, 0.28, 0.26, 0.22, 0.22]; SWUnits=Volumetric; OCUnits=Total; PHUnits=Water
          LayerStructure: Thickness=[150, 150, 300, 300, 300, 300, 300, 200]
        Plant Oats: CropType=Wheat; IsEnding=false; DaysAfterEnding=0
        Report FRNLReport: EventNames=[Clock].DoReport
          VariableNames:
            [Clock].Today
            [CropOperations].Script.CropSown
            [CropOperations].Script.CropAction
            [ClimateControl].Script.RainshelterCover
            [FodderBeet].Phenology.Stage
            [FodderBeet].Phenology.CurrentPhaseName
            [FodderBeet].Phenology.CurrentStageName
            [Oats].Phenology.Stage
            [FodderBeet].Structure.MainStemPopn
            [FodderBeet].AboveGroundLive.Wt as FodderBeet.AboveGround.Live.Wt
            [FodderBeet].Leaf.Live.Wt
            [FodderBeet].Petiole.Live.Wt
            [FodderBeet].StorageRoot.Live.Wt
            [FodderBeet].Root.Live.Wt
            [FodderBeet].AboveGround.N
            [FodderBeet].Leaf.N
            [FodderBeet].Petiole.N
            [FodderBeet].StorageRoot.N
            [FodderBeet].Total.NConc
            [FodderBeet].AboveGround.NConc
            [FodderBeet].Leaf.Live.NConc
            [FodderBeet].Petiole.NConc
            [FodderBeet].StorageRoot.NConc
            [FodderBeet].Root.NConc
            [FodderBeet].Leaf.LAI
            [FodderBeet].Leaf.CoverTotal
            [FodderBeet].Leaf.GreenCohortNo
            [FodderBeet].Leaf.DeadCohortNo
            [FodderBeet].Structure.LeafTipsAppeared
            [FodderBeet].Leaf.Height
            [FodderBeet].Root.Depth
            [FodderBeet].Leaf.Fn
            [FodderBeet].Leaf.Fw
            [FodderBeet].Leaf.Fw
            [Oats].Structure.MainStemPopn
            [Oats].AboveGroundLive.Wt as Oats.AboveGround.Live.Wt
            [Oats].Leaf.Live.Wt
            [Oats].Stem.Live.Wt
            [Oats].Panicle.Live.Wt
            [Oats].Grain.Live.Wt
            [Oats].Root.Live.Wt
            [Oats].Ear.Wt
            [Oats].Panicle.Wt
            [Oats].Leaf.Dead.Wt
            [Oats].AboveGround.N
            [Oats].Leaf.N
            [Oats].Stem.N
            [Oats].Grain.N
            [Oats].Total.NConc
            [Oats].AboveGround.NConc
            [Oats].Leaf.Live.NConc
            [Oats].Stem.Live.NConc
            [Oats].Leaf.Dead.Nconc
            [Oats].Stem.NConc
            [Oats].Spike.NConc
            [Oats].Grain.NConc
            [Oats].Root.NConc
            [Oats].Ear.NConc
            [Oats].Grain.Live.NConc
            [Oats].Panicle.Live.NConc
            [Oats].Leaf.LAI
            [Oats].Leaf.CoverTotal
            [Oats].Leaf.GreenCohortNo
            [Oats].Leaf.DeadCohortNo
            [Oats].Structure.LeafTipsAppeared
            [Oats].Leaf.ExpandedCohortNo
            [Oats].Leaf.SenescingCohortNo
            [Oats].Leaf.Height
            [Oats].Root.Depth
            [Oats].Leaf.Fn
            [Oats].Leaf.Fw
            [Oats].Leaf.Fw
            [Weather].Rain
            [Irrigation].IrrigationApplied
            ([FodderBeet].Leaf.Transpiration + [Oats].Leaf.Transpiration + [Soil].SoilWater.Es + [MicroClimate].PrecipitationInterception) as ET
            ([FodderBeet].Leaf.Transpiration + [Soil].SoilWater.Es + [MicroClimate].PrecipitationInterception) as FodderBeet_ET
            ([Oats].Leaf.Transpiration + [Soil].SoilWater.Es + [MicroClimate].PrecipitationInterception) as Oats_ET
            [MicroClimate].interception as Interception
            [Soil].SoilWater.Es as Evaporation
            ([FodderBeet].Leaf.Transpiration + [Oats].Leaf.Transpiration) as Transpiration
            [Soil].SoilWater.Drainage as Drainage
            [Soil].SoilWater.Runoff as Runoff
            sum([Soil].SoilWater.SWmm) as TotalSoilWater
            sum([Soil].SATmm) as TotalSoilSAT
            sum([Soil].DULmm) as TotalSoilDUL
            sum([Soil].LL15mm) as TotalSoilLL
            sum([Soil].SoilWater.SWmm[1:7]) as Soil.SoilWater.ProfileWater
            [Soil].SoilWater.SW
            [Soil].SoilWater.SWmm
            [Fertiliser].NitrogenApplied as FertiliserN
            sum([Soil].SoilNitrogen.dlt_n_min_res) as SurfOMMineralisedN
            sum([Soil].SoilNitrogen.MineralisedN) as MineralisedN
            sum([Soil].SoilNitrogen.Denitrification) as DenitrifiedN
            (-[FodderBeet].Root.NUptake - [Oats].Root.NUptake) as UptakeN
            ([Soil].SoilWater.LeachNO3+[Soil].SoilWater.LeachNH4) as Soil.SoilNitrogen.NLeached
            ([Soil].SoilWater.FlowNO3[3] + [Soil].SoilWater.FlowNH4[3]) as Soil.SoilNitrogen.NLeach60cm
            [SurfaceOrganicMatter].N as TotalSurfOMN
            sum([Soil].SoilNitrogen.FOMN) as TotalFOMN
            sum([Soil].SoilNitrogen.MicrobialN) as TotalMicrobialN
            sum([Soil].SoilNitrogen.HumicN) as TotalHumicN
            (sum([Soil].SoilNitrogen.NH4.kgha) + sum([Soil].SoilNitrogen.NO3.kgha)) as TotalSoilN
            sum([Soil].SoilNitrogen.Urea.kgha) as TotalUrea
            sum([Soil].SoilNitrogen.NH4.kgha) as TotalNH4
            sum([Soil].SoilNitrogen.NO3.kgha) as TotalNO3
            sum([Soil].SoilNitrogen.NH4.kgha[1:6]) as Soil.SoilNitrogen.ProfileNH4
            sum([Soil].SoilNitrogen.NO3.kgha[1:6]) as Soil.SoilNitrogen.ProfileNO3
            sum([Soil].SoilNitrogen.NH4.kgha[1:6]+[Soil].SoilNitrogen.NO3.kgha[1:6]) as Soil.SoilNitrogen.ProfileMineralN
            [Soil].SoilNitrogen.NH4.kgha
            [Soil].SoilNitrogen.NO3.kgha
            ([Soil].SoilNitrogen.NH4.kgha+[Soil].SoilNitrogen.NO3.kgha) as Soil.SoilNitrogen.mineral_n
            [Soil].Thickness
            [Soil].Temperature
            [Weather].MeanT
            [Weather].Radn
        Plant FodderBeet: CropType=FodderBeet; IsEnding=false; DaysAfterEnding=0
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